# OpenSim document version 40000
AnalyzeTool:
  model_file: C:\Users\Willi\Documents\Github\OpenSimMatlabBasic\ExampleData\osimModel.osim
  replace_force_set: false
  force_set_files: C:\Users\Willi\Documents\Github\OpenSimMatlabBasic\ExampleData\osimModel_actuators.xml
  results_directory: C:\Users\Willi\Documents\Github\OpenSimOutputToMAT\ExampleOutput\osimModel\dynamic03\Output\SO
  output_precision: 8
  initial_time: 0
  final_time: 1.126667
  solve_for_equilibrium_for_auxiliary_states: false
  maximum_number_of_integrator_steps: 20000
  maximum_integrator_step_size: 1
  minimum_integrator_step_size: 1e-8
  integrator_error_tolerance: 1e-5
  external_loads_file: C:\Users\Willi\Documents\Github\OpenSimMatlabBasic\ExampleData\Trials\dynamic03\GRF.xml
  coordinates_file: C:\Users\Willi\Documents\Github\OpenSimOutputToMAT\ExampleOutput\osimModel\dynamic03\Output\IK\IK.mot
  lowpass_cutoff_frequency_for_coordinates: 6
  AnalysisSet Analyses:
    StaticOptimization: start_time=0 end_time=1.126667 step_interval=1 in_degrees=true use_model_force_set=true
        activation_exponent=2 use_muscle_physiology=true optimizer_convergence_criterion=0.0001
        optimizer_max_iterations=100
